# OpenSim document version 30000
ScaleTool subject_scale_walk_scaleOnly:
  mass: 85.0668 [kg]
  height: 1829
  age: 31
  GenericModelMaker:
    model_file: ../generic_unscaled.osim
    marker_set_file: markerset_walk_preScale.xml
  ModelScaler:
    apply: true
    scaling_order: manualScale measurements
    marker_file: ../ExpData/static_walk_1.trc
    time_range: 0 0.3
    preserve_mass_distribution: true
    output_scale_file: scaleSet_applied_walk.xml
    MeasurementSet:
      Measurement PelvisX: apply=true
        MarkerPair: markers=(MidPSIS MidASIS)
        BodyScale pelvis: axes=X
      Measurement PelvisY: apply=true
        MarkerPair: markers=(L.ASIS L_HJC)
        MarkerPair: markers=(R.ASIS R_HJC)
        MarkerPair: markers=(L.PSIS L_HJC)
        MarkerPair: markers=(R.PSIS R_HJC)
        BodyScale pelvis: axes=Y
      Measurement PelvisZ: apply=true
        MarkerPair: markers=(L.ASIS R.ASIS)
        MarkerPair: markers=(L_HJC R_HJC)
        BodyScale pelvis: axes=Z
      Measurement footX: apply=true
        MarkerPair: markers=(L.HeelGround L.MT5Ground)
        MarkerPair: markers=(R.HeelGround R.MT5Ground)
        MarkerPair: markers=(L.HeelGround L.ToeGround)
        MarkerPair: markers=(R.HeelGround R.ToeGround)
        BodyScale talus_l: axes=X
        BodyScale talus_r: axes=X
        BodyScale calcn_l: axes=X
        BodyScale calcn_r: axes=X
        BodyScale toes_l: axes=X
        BodyScale toes_r: axes=X
      Measurement footY: apply=true
        MarkerPair: markers=(L.AnkleJoint L.AnkleJointGround)
        MarkerPair: markers=(R.AnkleJoint R.AnkleJointGround)
        BodyScale talus_l: axes=Y
        BodyScale talus_r: axes=Y
        BodyScale calcn_l: axes=Y
        BodyScale calcn_r: axes=Y
        BodyScale toes_l: axes=Y
        BodyScale toes_r: axes=Y
      Measurement footZ: apply=true
        MarkerPair: markers=(L.MT5Ground L.ToeGround)
        MarkerPair: markers=(R.MT5Ground R.ToeGround)
        BodyScale talus_l: axes=Z
        BodyScale talus_r: axes=Z
        BodyScale calcn_l: axes=Z
        BodyScale calcn_r: axes=Z
        BodyScale toes_l: axes=Z
        BodyScale toes_r: axes=Z
    ScaleSet:
      Scale: scales=(0.958 0.958 0.958) segment=femur_r apply=true
      Scale: scales=(0.958 0.958 0.958) segment=patella_r apply=true
      Scale: scales=(0.958 0.958 0.958) segment=femur_l apply=true
      Scale: scales=(0.958 0.958 0.958) segment=patella_l apply=true
      Scale: scales=(1.149 1.149 1.149) segment=tibia_r apply=true
      Scale: scales=(1.149 1.149 1.149) segment=tibia_l apply=true
      Scale: scales=(1.21013 1.17781 1.21013) segment=torso apply=true
      Scale: scales=(1.09817 1.09817 1.09817) segment=humerus_r apply=true
      Scale: scales=(1.09817 1.09817 1.09817) segment=humerus_l apply=true
      Scale: scales=(1.01397 1.01397 1.01397) segment=radius_r apply=true
      Scale: scales=(1.01397 1.01397 1.01397) segment=ulna_r apply=true
      Scale: scales=(1.01397 1.01397 1.01397) segment=radius_l apply=true
      Scale: scales=(1.01397 1.01397 1.01397) segment=ulna_l apply=true
  MarkerPlacer:
    apply: true
    marker_file: ../ExpData/static_walk_1.trc
    time_range: 0 0.3
    output_motion_file: scale_output_walk.mot
    output_model_file: subject_scaled_walk.osim
    output_marker_file: subject_scaled_walk_markerset.xml
    max_marker_movement: -1
    IKTaskSet:
      IKMarkerTask L.Shoulder: apply=true weight=5
      IKMarkerTask R.Shoulder: apply=true weight=5
      IKMarkerTask L.Clavicle: apply=true weight=3
      IKMarkerTask R.Clavicle: apply=true weight=3
      IKMarkerTask L.Elbow: apply=true weight=5
      IKMarkerTask R.Elbow: apply=true weight=5
      IKMarkerTask L.MElbow: apply=true weight=5
      IKMarkerTask R.MElbow: apply=true weight=5
      IKMarkerTask L.Wrist: apply=true weight=5
      IKMarkerTask R.Wrist: apply=true weight=5
      IKMarkerTask L.ASIS: apply=true weight=20
      IKMarkerTask R.ASIS: apply=true weight=20
      IKMarkerTask L.PSIS: apply=true weight=10
      IKMarkerTask R.PSIS: apply=true weight=10
      IKMarkerTask S2: apply=true weight=5
      IKMarkerTask L_HJC: apply=true weight=50
      IKMarkerTask R_HJC: apply=true weight=50
      IKMarkerTask L.Knee: apply=true weight=15
      IKMarkerTask R.Knee: apply=true weight=15
      IKMarkerTask L.MKnee: apply=true weight=15
      IKMarkerTask R.MKnee: apply=true weight=15
      IKMarkerTask L.Ankle: apply=true weight=25
      IKMarkerTask R.Ankle: apply=true weight=25
      IKMarkerTask L.MAnkle: apply=true weight=5
      IKMarkerTask R.MAnkle: apply=true weight=5
      IKMarkerTask L.ToeGround: apply=true weight=5
      IKMarkerTask R.ToeGround: apply=true weight=5
      IKMarkerTask L.MT5Ground: apply=true weight=100
      IKMarkerTask R.MT5Ground: apply=true weight=100
      IKMarkerTask L.HeelGround: apply=true weight=100
      IKMarkerTask R.HeelGround: apply=true weight=100
      IKMarkerTask L.Toe: apply=false weight=0
      IKMarkerTask R.Toe: apply=false weight=0
      IKMarkerTask L.MT5: apply=false weight=0
      IKMarkerTask R.MT5: apply=false weight=0
      IKMarkerTask L.Heel: apply=false weight=0
      IKMarkerTask R.Heel: apply=false weight=0
      IKMarkerTask L.AnkleJoint: apply=false weight=0
      IKMarkerTask R.AnkleJoint: apply=false weight=0
      IKMarkerTask L.AnkleJointGround: apply=false weight=0
      IKMarkerTask R.AnkleJointGround: apply=false weight=0
      IKMarkerTask L.Biceps: apply=false weight=0
      IKMarkerTask R.Biceps: apply=false weight=0
      IKMarkerTask L.Forearm: apply=false weight=0
      IKMarkerTask R.Forearm: apply=false weight=0
      IKMarkerTask L.TH1: apply=false weight=0
      IKMarkerTask R.TH1: apply=false weight=0
      IKMarkerTask L.TH2: apply=false weight=0
      IKMarkerTask R.TH2: apply=false weight=0
      IKMarkerTask L.TH3: apply=false weight=0
      IKMarkerTask R.TH3: apply=false weight=0
      IKMarkerTask L.SH1: apply=false weight=0
      IKMarkerTask R.SH1: apply=false weight=0
      IKMarkerTask L.SH2: apply=false weight=0
      IKMarkerTask R.SH2: apply=false weight=0
      IKMarkerTask L.SH3: apply=false weight=0
      IKMarkerTask R.SH3: apply=false weight=0
      IKMarkerTask R.SH4: apply=false weight=0
      IKMarkerTask L.TH4: apply=false weight=0
      IKMarkerTask L.KneeJoint: apply=false weight=0
      IKMarkerTask R.KneeJoint: apply=false weight=0
      IKMarkerTask MidASIS: apply=false weight=0
      IKMarkerTask MidPSIS: apply=false weight=0
      IKMarkerTask MidClavicle: apply=false weight=0
      IKMarkerTask Head: apply=false weight=0
